i := 0 .. 3
i = [0; 1; 2; 3]
x[i] := 2, 3, 5, 6
y[i] := 4, 1, 7, 2
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L(x) := 4*(x - 3)*(x - 5)*(x - 6)/((2 - 3)*(2 - 5)*(2 - 6)) + 1*(x - 2)*(x - 5)*(x - 6)/((3 - 2)*(3 - 5)*(3 - 6)) + 7*(x - 2)*(x - 3)*(x - 6)/((5 - 2)*(5 - 3)*(5 - 6)) + 2*(x - 2)*(x - 3)*(x - 5)/((6 - 2)*(6 - 3)*(6 - 5)) collect → 41*x^2/3 - 7*x^3/6 - 295*x/6 + 57
L(2.02) = 3.83266
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